**
** Heading +++++++++++++++++++++++++++++++++++++++++++++++++
**
*Heading
Hash: FU7FqNXE, Date: 03/17/2026, Unit system: MM_TON_S_C
bem_pipe_1m.pmx
pyBEM - BEM solver tests:
circular pipe with surfaces for BCs (vels & impedance)
Generic test model to calc open ends and
quarter wave pipes (open one end).
**
** Nodes +++++++++++++++++++++++++++++++++++++++++++++++++++
**
*Node
1, 1.00000000E+003, 0.00000000E+000, 5.00000000E+001
2, 1.00000000E+003, 0.00000000E+000, -5.00000000E+001
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**
** Elements ++++++++++++++++++++++++++++++++++++++++++++++++
**
*Element, Type=S4, Elset=pipe_1m
1, 5, 2, 10, 96
2, 6, 5, 96, 97
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*Element, Type=S3, Elset=pipe_1m
188, 263, 232, 231
221, 90, 89, 469
379, 408, 409, 441
445, 454, 9, 1
449, 2, 451, 95
453, 6, 7, 452
455, 456, 92, 93
477, 474, 476, 475
*Element, Type=mics_S4, Elset=mics_surfs
479, 487, 477, 524, 666
480, 478, 487, 666, 488
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*Element, Type=mics_S3, Elset=mics_surfs
541, 698, 697, 555
595, 519, 520, 704
622, 520, 521, 772
630, 483, 735, 594
668, 483, 596, 735
670, 766, 765, 626
**
** Node sets +++++++++++++++++++++++++++++++++++++++++++++++
**
*Nset, Nset=Internal-1_inlet
3, 4, 45, 46, 47, 48
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*Nset, Nset=Internal-1_outlet
1, 2, 5, 6, 7, 8
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**
** Element sets ++++++++++++++++++++++++++++++++++++++++++++
**
*Elset, Elset=pipe
1, 2, 3, 4, 5, 6
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*Elset, Elset=Internal-1_inlet_S2
220, 221, 441, 458, 459, 460
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*Elset, Elset=Internal-1_outlet_S2
442, 443, 444, 445, 446, 447, 448, 449, 450, 451, 452, 453, 454, 455, 456, 457
**
** Surfaces ++++++++++++++++++++++++++++++++++++++++++++++++
**
*Surface, Name=inlet, Type=Element
Internal-1_inlet_S2, S2
*Surface, Name=outlet, Type=Element
Internal-1_outlet_S2, S2
**
** Physical constants ++++++++++++++++++++++++++++++++++++++
**
**
** Coordinate systems ++++++++++++++++++++++++++++++++++++++
**
**
** Sections ++++++++++++++++++++++++++++++++++++++++++++++++
**
*Shell section, Elset=pipe, Material=Air, Offset=0
1
**
** Materials +++++++++++++++++++++++++++++++++++++++++++++++
**
*Material, Name=Air
*Density
1.21E-12
*Acoustic Medium
 0.1424,
** Bulk modulus (B): c = sqrt(B/Rho)

**
** Pre-tension sections ++++++++++++++++++++++++++++++++++++
**
**
** Constraints +++++++++++++++++++++++++++++++++++++++++++++
**
**
** Surface interactions ++++++++++++++++++++++++++++++++++++
**
**
** Contact pairs +++++++++++++++++++++++++++++++++++++++++++
**
**
** Amplitudes ++++++++++++++++++++++++++++++++++++++++++++++
**
*Amplitude, Name=Amp_pres
20, 1.0, 1e4, 100.0
**
*Amplitude, Name=Amp_impe
20, 1.0e-4, 1e4, 100.0e-6
**
*Amplitude, Name=Amp_vels
20, 1.0, 1e4, 100.0
**
** Initial conditions ++++++++++++++++++++++++++++++++++++++
**
**
** Steps +++++++++++++++++++++++++++++++++++++++++++++++++++
**
**
** Step-1 ++++++++++++++++++++++++++++++++++++++++++++++++++
**
*Step
*Steady state dynamics
20, 1200, 119, 1
** min, max, n_freqs, bias: 1=linear; 2=log
**
** Damping +++++++++++++++++++++++++++++++++++++++++++++++++
**
*Modal damping
1, 1000000, 0.03
**
** Controls ++++++++++++++++++++++++++++++++++++++++++++++++
**
**
** Output frequency ++++++++++++++++++++++++++++++++++++++++
**
**
** Boundary conditions +++++++++++++++++++++++++++++++++++++
**
*Boundary, op=New
** Ac. pressure DoF = 8
** *Boundary, Amplitude=Amp_pres, Load case=1
*Boundary, Load case=1
inlet, 8, 8, 2E-11
** outlet, 8, 8, 2E-11
** inlet, 8, 8, 1
**
** Acoustic Impedance - on a Surface
** *Impedance, Amplitude=Amp_impe, Load case=1
** *Impedance, Load case=1
** outlet, 0.00000041503
**
** Loads +++++++++++++++++++++++++++++++++++++++++++++++++++
**
*Cload, op=New
*Dload, op=New
** Name: Vels: Deactivated
** Acoustic Vels - on a Surface - DoF = 8
** *Cload, Amplitude=Amp_vels, Load case=1
** *Cload, Load case=1
** inlet, 8, 1.3e-14
** outlet, 8, 1.3e-14
** inlet, 8, 1.0
**
**
** Defined fields ++++++++++++++++++++++++++++++++++++++++++
**
**
** History outputs +++++++++++++++++++++++++++++++++++++++++
**
**
** Field outputs +++++++++++++++++++++++++++++++++++++++++++
**
**
** End step ++++++++++++++++++++++++++++++++++++++++++++++++
**
*End step
