**
** Heading +++++++++++++++++++++++++++++++++++++++++++++++++
**
*Heading
Hash: FU7FqNXE, Date: 09/16/2026, Unit system: MM_TON_S_C
zones_pipe_1m.pmx
Check split_QUADs method
pyBEM tests | multi-zone implementation:
circular pipe with surfaces for BCs (vels & impedance)
Generic test model to calc open ends and
CASE 3: PRES @ INLET & IMPE(z = rho x c) @ OUTLET | OPen pipe both ends; i.e. no resonant peaks expected.
----------------------------------------
**
** Nodes +++++++++++++++++++++++++++++++++++++++++++++++++++
**
*Node
1, 0.00000000E+000, 0.00000000E+000, 5.00000000E+001
2, 0.00000000E+000, 0.00000000E+000, -5.00000000E+001
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**
** Elements ++++++++++++++++++++++++++++++++++++++++++++++++
**
*Element, Type=S3, Elset=bem_z1
1, 69, 68, 67
5, 10, 69, 11
6, 2, 7, 8
9, 6, 68, 7
151, 7, 172, 6
154, 169, 168, 173
*Element, Type=S4, Elset=bem_z1
2, 6, 5, 67, 68
3, 67, 5, 1, 12
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*Element, Type=S4, Elset=bem_z2
265, 264, 268, 328, 275
266, 269, 270, 329, 328
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*Element, Type=S3, Elset=bem_z2
270, 268, 269, 328
271, 271, 272, 330
279, 264, 275, 280
280, 276, 277, 331
391, 320, 321, 419
393, 301, 302, 419
403, 323, 324, 420
404, 325, 326, 421
*Element, Type=mics_S4, Elset=mics_z1
510, 517, 507, 536, 608
511, 508, 517, 608, 518
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*Element, Type=mics_S3, Elset=mics_z1
570, 530, 531, 629
581, 532, 533, 660
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**
** Node sets +++++++++++++++++++++++++++++++++++++++++++++++
**
*Nset, Nset=Internal-1_inlet
1, 2, 5, 6, 7, 8
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*Nset, Nset=Internal-1_outlet
266, 267, 298, 299, 300, 301
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*Nset, Nset=Internal-1_Internal_Selection-1_Tie-1_Master
264, 265, 268, 269, 270, 271
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*Nset, Nset=Internal-1_Internal_Selection-1_Tie-1_Slave
3, 4, 13, 14, 15, 16
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**
** Element sets ++++++++++++++++++++++++++++++++++++++++++++
**
*Elset, Elset=z1_bem
1, 2, 3, 4, 5, 6
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*Elset, Elset=z2_bem
265, 266, 267, 268, 269, 270
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*Elset, Elset=z1_mics
510, 511, 512, 513, 514, 515
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*Elset, Elset=z2_mics
652, 653, 654, 655, 656, 657
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*Elset, Elset=Internal-1_inlet_S2
1, 2, 3, 4, 5, 6
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*Elset, Elset=Internal-1_outlet_S2
389, 390, 391, 392, 393, 394, 395, 398, 399, 400, 401, 402, 403, 404
*Elset, Elset=Internal-1_Internal_Selection-1_Tie-1_Master_S2
265, 266, 267, 268, 269, 270, 271, 272, 274, 275, 276, 277, 278, 279, 280
*Elset, Elset=Internal-1_Internal_Selection-1_Tie-1_Slave_S2
11, 12, 13, 14, 15, 16, 19, 20, 21, 22, 23, 24, 25, 26, 27, 28
**
** Surfaces ++++++++++++++++++++++++++++++++++++++++++++++++
**
*Surface, Name=inlet, Type=Element
Internal-1_inlet_S2, S2
*Surface, Name=outlet, Type=Element
Internal-1_outlet_S2, S2
*Surface, Name=Internal_Selection-1_Tie-1_Master, Type=Element
Internal-1_Internal_Selection-1_Tie-1_Master_S2, S2
*Surface, Name=Internal_Selection-1_Tie-1_Slave, Type=Element
Internal-1_Internal_Selection-1_Tie-1_Slave_S2, S2
**
** Physical constants ++++++++++++++++++++++++++++++++++++++
**
**
** Coordinate systems ++++++++++++++++++++++++++++++++++++++
**
**
** Materials +++++++++++++++++++++++++++++++++++++++++++++++
**
*Material, Name=z1_Air
*Density
1.21E-12
*Acoustic Medium
 0.1424,
** Bulk modulus (B): c = sqrt(B/Rho)
*Material, Name=z2_Air
*Density
1.21E-12
*Acoustic Medium
 0.1424,
** Bulk modulus (B): c = sqrt(B/Rho)
**
** Sections ++++++++++++++++++++++++++++++++++++++++++++++++
**
*Shell section, Elset=z1_bem, Material=z1_Air, Offset=0
1
*Shell section, Elset=z2_bem, Material=z2_Air, Offset=0
1
*Shell section, Elset=z1_mics, Material=z1_Air, Offset=0
1
*Shell section, Elset=z2_mics, Material=z2_Air, Offset=0
1
**
** Pre-tension sections ++++++++++++++++++++++++++++++++++++
**
**
** Constraints +++++++++++++++++++++++++++++++++++++++++++++
**
*Tie, Name=Tie-1, Position tolerance=1
Internal_Selection-1_Tie-1_Slave, Internal_Selection-1_Tie-1_Master
**
** Surface interactions ++++++++++++++++++++++++++++++++++++
**
**
** Contact pairs +++++++++++++++++++++++++++++++++++++++++++
**
**
** Amplitudes ++++++++++++++++++++++++++++++++++++++++++++++
**
**
** Initial conditions ++++++++++++++++++++++++++++++++++++++
**
**
** Steps +++++++++++++++++++++++++++++++++++++++++++++++++++
**
**
** Step-1 ++++++++++++++++++++++++++++++++++++++++++++++++++
**
*Step
*Steady state dynamics
20, 1200, 119, 1
** 20, 1200, 1181, 1
**
** Damping +++++++++++++++++++++++++++++++++++++++++++++++++
**
*Modal damping
1, 1000000, 0.01
**
** Controls ++++++++++++++++++++++++++++++++++++++++++++++++
**
**
** Output frequency ++++++++++++++++++++++++++++++++++++++++
**
**
** Boundary conditions +++++++++++++++++++++++++++++++++++++
**
*Boundary, op=New
** Ac. pressure DoF = 8
*Boundary, Load case=1
inlet, 8, 8, 2E-11
** outlet, 8, 8, 2E-11
**
** Acoustic Impedance - on a Surface
*Impedance, Load case=1
** inlet, 4.1503e-7
outlet, 4.1503e-7
**
**
** Loads +++++++++++++++++++++++++++++++++++++++++++++++++++
**
*Cload, op=New
*Dload, op=New
** Name: Vels: Deactivated
** Acoustic Vels - on a Surface - DoF = 8
** *Cload, Load case=1
** inlet, 8, 5e-5
**
**
** Defined fields ++++++++++++++++++++++++++++++++++++++++++
**
**
** History outputs +++++++++++++++++++++++++++++++++++++++++
**
**
** Field outputs +++++++++++++++++++++++++++++++++++++++++++
**
**
** End step ++++++++++++++++++++++++++++++++++++++++++++++++
**
*End step
